<?xml version="1.0"?>
<Node>
	<RequiredPlugin name="SofaImplicitField" />
	<RequiredPlugin name="SofaImplicitField3" />
        <CustomField name="field"
                     function="cythoncustomfield.evalField"
                     glslFunction="cythoncustomfield.evalField" printLog="True"/>
        <PointCloudImplicitFieldVisualization field="@field" box="-1 -1 -1 1 1 1"/>
</Node>
