<?xml version="1.0"?>
<Node>
	<RequiredPlugin name="SofaImplicitField"/>
        <RequiredPlugin name="SofaImplicitField3"/>
	<CustomField name="field" function="customfield.evalField"/>
	<PointCloudImplicitFieldVisualization field="@field" box="-1 -1 -1 2 2 2"/>

        <Node>
                <VisualTransform transform="2 0 0 0 0 0 1"/>
                <SurfaceMeshGenerationFromScalarField field="@field" box="-1 -1 -1 2 2 2" step="0.05"/>
        </Node>
</Node>
